// COMSOL Multiphysics 5.1.0.234 model "Turing_dirichlet.mph"
// Outline of the model tree

Parameters
  c1 = 1
  c_1 = 2
  c2 = 3
  c3 = 1
  L = 1

Functions
  rn1: Random | nargs = 2

Geometry
  geom1 "Geometry 1" (1D, length unit m)
    i1: Interval | p2 = 1; p = {0, 1}
    fin: Finalize "Form Union"

Physics
  c: CoefficientFormPDE on all domains
    dependent variable u = {u, v}
    cfeq1: CoefficientFormPDE (default)
      c = {1e-3/L^2, 0, 0, 0.1/L^2}
      f = {c1-c_1*u+c3*u^2*v, c2-c3*u^2*v}
      da = {1, 0, 0, 1}
    zflx1: ZeroFluxBoundary "Zero Flux 1" (default)
    init1: init "Initial Values 1" (default) | u = 2+sin(x*pi)*20; v = 0.75-sin(x*pi)
    dir1: DirichletBoundary "Dirichlet Boundary Condition 1" on all boundaries | r = {2, 0.75}

Mesh
  mesh1 "Mesh 1" (physics-controlled)
    size: MeshSizeDefault | hauto = 1

Studies
  std1 "Study 1"
    time: Transient "Time Dependent" | tlist = range(0,100,1000)

Solver configurations
  sol1 "Solution 1" (study std1)
    v1: Variables "Dependent Variables 1"
    t1: Time "Time-Dependent Solver 1" | tlist = range(0,100,1000)
      dDef: Direct
      fc1: FullyCoupled | linsolver = dDef

Datasets
  dset1: Solution | solution = sol1
  par1: Parametric1D "Parametric Extrusion 1D 1" | data = dset1; leveltrans = none; levelscale = 1

Plots
  pg2: PlotGroup2D "2D Plot Group 2" | data = par1
    surf1: Surface | expr = u
  pg1: PlotGroup1D "1D Plot Group 1" | data = dset1
    lngr1: LineGraph on all domains | expr = u; xdata = expr; xdataexpr = x
    lngr2: LineGraph on all domains | expr = v